# Начальные значения:
x1 := 1
x2 := 1
# Дано:
a1 := 2
a2 := 2
b1 := 1
R := 100
# Целевая функция:
f(x1, x2) := a1*x1 + b1*x1^2 + a2*x2 + b2*x2^2  # error: This variable is undefined.
# Условия:
Given
x1 + x2 == R
# Функция
# поиска:
X := Minimize(f, x1, x2)  # error: This variable is undefined.
# Значение функциии в точке максимума:
f(X[0, 0], X[1, 0]) =  # error: This variable is undefined.
