# Начальные значения:
x1 := 1
x2 := 1
x3 := 1
# Дано:
p1 := 20
p2 := 15
p3 := 9
s1 := 0.2
s2 := 0.34
s3 := 0.13
# Целевая функция:
f(x1, x2, x3) := x1^s1 + x2^s2 + x3^s3
# Условия:
Given
p1*x1 + p2*x2 + p3*x3 ≤ R
# Функция
# поиска:
X := Maximize(f, x1, x2, x3)  # error: This variable is undefined.
# Значение функциии в точке максимума:
f(X[0, 0], X[1, 0], X[2, 0]) =  # error: This variable is undefined.
