# Начальные значения:
x1 := 1
x2 := 1
# Дано:
K := 20000
k1 := 440
k2 := 300
k3 := 20
k4 := 12
k5 := 1
R := 100
# Целевая функция:
f(x1, x2) := K - k1*x1 - k2*x2 + k3*x1^2 + k4*x2^2 + k5*x1*x2
# Условия:
Given
x1 + x2 == R
# Функция
# поиска:
X := Minimize(f, x1, x2) = [39.3549; 60.6452]
# Значение функциии в точке максимума:
f(X[0, 0], X[1, 0]) = 61987.2
